# Worksheet setting: ORIGIN = 1
KOKO := 235  # disabled
B := 232  # disabled
HTKOKO := 20  # list choice: 14mm = 14, 16mm = 16, 20mm = 20, 25mm = 25, 28mm = 28, 32mm = 32 = 20  # disabled
HTPIT := 660  # disabled
HTVÄLI1 := 104  # disabled
HTVÄLI2 := 0  # disabled
FCK := 50*MPa  # disabled
ALPHACC := 1  # disabled
MYYP := 1  # disabled
MYY := 0.8  # disabled
MYYS := MYY  # disabled
MYYC := MYY = 0.8  # disabled
rivi := 38
kohta := concat("InputOutput!", "R", num2str(rivi), "C2:R", num2str(rivi), "C17") = "InputOutput!R38C2:R38C17"
kohta = "InputOutput!R38C2:R38C17"
Setup := READEXCEL(".\Excel ajo.xlsx", kohta)
Setup := transpose(Setup)
[
    KOKO;
    B;
    HTVÄLI1;
    HTVÄLI2;
    HTKOKO;
    HTPIT;
    EMPTY;
    EMPTY;
    FCK;
    ALPHACC;
    EMPTY;
    MYYS;
    MYYC;
    MYYP;
    EMPTY;
    CLUKU
] := Setup
FCK := FCK*MPa
KOKO = 270
ALPHACC = 1
B = 267
MYYS = 0.9
HTVÄLI1 = 139
MYYC = 0.9
HTVÄLI2 = 0
MYYP = 1
HTPIT = 835
FCK = 60000000 Pa
CLUKU = "öö"
Setup = [270; 267; 139; 0; 20; 835; 0; 0; 60; 1; 0; 0.9; 0.9; 1; NaN; "öö"]
# [reference: 1-NM-Kuvaaja-Current.mcdx]
Setup := READEXCEL(".\Excel ajo.xlsx", kohta)
Setup := transpose(Setup)
[
    KOKO;
    B;
    HTVÄLI1;
    HTVÄLI2;
    HTKOKO;
    HTPIT;
    EMPTY;
    EMPTY;
    FCK;
    ALPHACC;
    EMPTY;
    MYYS;
    MYYC;
    MYYP;
    EMPTY;
    CLUKU
] := Setup
FCK := FCK*MPa
diag := 1
# [reference: 2 NM-Kuvaaja SLS Datasheet current.mcdx]
Setup := READEXCEL(".\Excel ajo.xlsx", kohta)
Setup := transpose(Setup)
[
    KOKO;
    B;
    HTVÄLI1;
    HTVÄLI2;
    HTKOKO;
    HTPIT;
    EMPTY;
    EMPTY;
    FCK;
    ALPHACC;
    EMPTY;
    MYYS;
    MYYC;
    MYYP;
    EMPTY;
    CLUKU
] := Setup
FCK := FCK*MPa
diag := 0
# [reference: 2 NM-Kuvaaja SLS Datasheet current.mcdx]
out := OuOut[2, 2]
out = -318.4
