# Worksheet setting: ORIGIN = 1
check := 0
# [reference: Betonin_lujuus_ja_muodonmuutosominaisuudet.mcdx]
# [reference: common.mcdx]
# [reference: integraaliaala.mcdx]
KOKO := 400
B := 390
HTKOKO := 28  # list choice: 14mm = 14, 16mm = 16, 20mm = 20, 25mm = 25, 28mm = 28, 32mm = 32 = 28
HTPIT := 960
HTVÄLI1 := 217
HTVÄLI2 := 140
CLUKU := "-"
FCK := 40*MPa
ALPHACC := 1
MYYP := 1
MYYS := 1
MYYC := 1
B = 395  # disabled
[
    KOKO;
    B;
    HTVÄLI1;
    HTVÄLI2;
    HTKOKO;
    HTPIT;
    EMPTY;
    EMPTY;
    FCK;
    ALPHACC;
    EMPTY;
    MYYS;
    MYYC;
    MYYP;
    EMPTY;
    CLUKU
] := [235; 232; 80; 0; 20; 660; 0; 0; 60*MPa; 1; 0; 1; 1; 1; NaN; "DE"] = [235; 232; 80; 0; 20; 660; NaN; NaN; 60000000 Pa; 1; NaN; 1; 1; 1; NaN; "DE"]  # disabled
kuva := "8MT"  # list choice: 4lukkoa-3d = "4MT", 2lukkoa-X-2d = "2MT", 8lukkoa-3d = "8MT", 4L = "4L", 8L = "8L" = "8MT"
kierot := 0  # 1 tai 0
KOKO = 235  # disabled
MYYP = 1
concat("C", num2str(round((KOKO - HTVÄLI1 - 6)/2))) = "C89"
NIMI :=
    if HTVÄLI2 == 0
        concat(num2str(KOKO), "-", num2str(HTVÄLI1), " 4D", num2str(HTKOKO))
    else
        concat(num2str(KOKO), "-", num2str(HTVÄLI1), "-", num2str(HTVÄLI2), " 8D", num2str(HTKOKO))
NIMI :=
    if HTPIT == 0
        NIMI
    else
        concat(NIMI, "-", num2str(HTPIT))
FILE := NIMI = "400-217-140 8D28-960"
NIMI :=
    if CLUKU == "öö"
        NIMI
    else
        concat(NIMI, " ", CLUKU)
Product := NIMI = "400-217-140 8D28-960 -"
b := B*mm = 390 mm
f_yk.orig := 500*MPa
b = 0.39 m
E_s := 200*GPa
l_v1 := HTVÄLI1*mm = 0.217 m
l_v2 := HTVÄLI2*mm = 140 mm
f_ck.orig := FCK = 40 MPa
# Factors
f_ck.orig = 40000000 Pa
α_cc := ALPHACC = 1
γ_c := 1.5  # Partial factor congrete
γ_s := 1.15  # Partial factor steel
μ_p := MYYP = 1  # Piling
# Ruotsi
μ_s := MYYS = 1
μ_c := MYYC = 1
# Materiaali parametri
tkb := 1
C_model := 3  # list choice: Paraabeli-suorakaide = 2, Bi-lineaarinen = 3 = 3
RB_m := 1  # (ei käytössä)
ϕ_orig := HTKOKO*mm = 0.028 m
L_rb := HTPIT*mm
E1N := sqrt(4*194.3*kN*f_yk.orig*γ_s*μ_s*π)/(f_yk.orig*μ_s*π*mm) = 23.8537
E2N := sqrt(4*254.89*kN*f_yk.orig*γ_s*μ_s*π)/(f_yk.orig*μ_s*π*mm) = 27.3209
ϕ_eff.n := 12  # list choice: 16mm = 1, 20mm = 2, 25mm = 3, 28mm = 4, 32mm = 5, M16 = 6, M20 = 7, M24 = 8, M27 = 9, E1 = 10, E2 = 11, No threads = 12 = 12
ϕ_eff.others := [16; 20; 25; 28; 32; 14.1236; 17.6545; 21.1854; 24.1854; E1N; E2N; 99999] = [16; 20; 25; 28; 32; 14.1236; 17.6545; 21.1854; 24.1854; 23.8537; 27.3209; 99999]
ϕ_eff := ϕ_eff.others[ϕ_eff.n]*mm = 99999 mm
ϕ := min([ϕ_orig; ϕ_eff]) = 28 mm
ϕ_eff := ϕ = 28 mm
f_ck.orig = 40000000 Pa
check := 0  # list choice: No = 0, Centrum 350 = 1, RTB-250-16 = 5, RTB-300-16 = 4, RTC-300-16 = 3, RTC-350-16 = 2
# Tarkastus Centrum jatkos 350 vastaan
f_ck.orig := 50*MPa  # disabled
α := 0*deg + 0*deg  # disabled
E_s := 200*GPa  # disabled
γ_c := 1.5  # disabled
γ_s := 1.15  # disabled
α_cc := 1  # disabled
μ_s := 1  # disabled
μ_c := 1  # disabled
μ_p := 1  # disabled
b := 344*mm  # disabled
ϕ := 20*mm  # disabled
f_yk.orig := 500*MPa  # disabled
l_v1 := 220*mm  # disabled
l_v2 := 0*mm  # disabled
check := 1  # disabled
tkb := 0  # disabled
r_e := (b - l_v1)/2 = 86.5 mm
r_e2 := (b - l_v2)/2 = 125 mm
b2 := b/2 = 195 mm
XXXXXXXXXXXXXXXXXXXXXXXXXXXXXXXXXXXXXXXXXXXXXXXXXXXXXXXXXXXXXXXXXXXXXXXXXXXXXXXXXXXXXXXXXXX
f_yk := f_yk.orig = 500 MPa
f_ck := f_ck.orig = 40 MPa
α := (0 deg  # list choice: 0 = 0, 45 = 45) + 90*deg*kierot = 0
f_ck.orig = 40000000 Pa
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B_koords.orig := [0, -b/2; 0, b/2; b, b/2; b, -b/2]
B_koords := B_koords.orig = [0, -0.195; 0, 0.195; 0.39, 0.195; 0.39, -0.195] m
lv_1.special := 80*mm
Rebars_Koords.orig := [0.076, -0.04; 0.156, 0.04] m
Rebars_Koords.orig :=
    if l_v1 > 0*mm
        if l_v2 == 0*mm
            res ← [r_e, r_e - b/2; r_e, b/2 - r_e; b - r_e, b/2 - r_e; b - r_e, r_e - b/2]
            res
        else
            res ← [
                b/2 - l_v2/2, l_v1/2;
                b/2 + l_v2/2, l_v1/2;
                b/2 - l_v2/2, -l_v1/2;
                b/2 + l_v2/2, -l_v1/2;
                b/2 - l_v1/2, l_v2/2;
                b/2 + l_v1/2, l_v2/2;
                b/2 - l_v1/2, -l_v2/2;
                b/2 + l_v1/2, -l_v2/2
            ]
            res
    else
        -1
    = [
        0.125, 0.1085;
        0.265, 0.1085;
        0.125, -0.1085;
        0.265, -0.1085;
        0.0865, 0.07;
        0.3035, 0.07;
        0.0865, -0.07;
        0.3035, -0.07
    ] m
[0.076, -0.04; 0.076, 0.04; 0.156, 0.04; 0.156, -0.04]
[0.076, 0.04; 0.156, -0.04]
Rebars_Koords := Rebars_Koords.orig = [
    0.125, 0.1085;
    0.265, 0.1085;
    0.125, -0.1085;
    0.265, -0.1085;
    0.0865, 0.07;
    0.3035, 0.07;
    0.0865, -0.07;
    0.3035, -0.07
] m
Rebars_Koords := [0.064, -0.052; 0.168, 0.052] m  # disabled
Rebars_A;s.orig :=
    for i ∈ 1 .. rows(Rebars_Koords)
        test[i] ← A_c.d(ϕ)
        test
    = [615.752; 615.752; 615.752; 615.752; 615.752; 615.752; 615.752; 615.752] mm^2
Rebars_Koords = [125, 108.5; 265, 108.5; 125, -108.5; 265, -108.5; 86.5, 70; 303.5, 70; 86.5, -70; 303.5, -70] mm
Rebars_A;s := Rebars_A;s.orig = [0.000615752; 0.000615752; 0.000615752; 0.000615752; 0.000615752; 0.000615752; 0.000615752; 0.000615752] m^2
R(α) := [cos(α), sin(α); -sin(α), cos(α)]
B_koords := R(α)*transpose(B_koords)
Rebars_Koords := R(α)*transpose(Rebars_Koords)
B_koords := transpose(B_koords) = [0, -195; 0, 195; 390, 195; 390, -195] mm
Rebars_Koords := transpose(Rebars_Koords) = [125, 108.5; 265, 108.5; 125, -108.5; 265, -108.5; 86.5, 70; 303.5, 70; 86.5, -70; 303.5, -70] mm
B_koords.orig := B_koords
Rebars_Koords.orig := Rebars_Koords
Y_move := (max(B_koords[:, 2]) + min(B_koords[:, 2]))/2 = 0 m
X_move := min(B_koords[:, 1]) = 0 m
B_koords := MsubCV(B_koords, 2, -Y_move)
Rebars_Koords := MsubCV(Rebars_Koords, 2, -Y_move)
B_koords := MsubCV(B_koords, 1, -X_move)
Rebars_Koords := MsubCV(Rebars_Koords, 1, -X_move)
B_koords = [0, -195; 0, 195; 390, 195; 390, -195] mm
Rebars_P;s := Rebars_Koords[:, 2] = [108.5; 108.5; -108.5; -108.5; 70; 70; -70; -70] mm
B_x.max := max(B_koords[:, 1]) = 0.39 m
B_y.max := max(B_koords[:, 2]) = 0.195 m
B_x.min := min(B_koords[:, 1]) = 0 m
B_y.min := min(B_koords[:, 2]) = -0.195 m
f_yk := f_yk*μ_s = 500 MPa
f_ck := f_ck*μ_c*μ_p = 40 MPa
f_yd := f_yk/γ_s = 434.783 MPa
f_cd := α_cc*f_ck/γ_c = 26.6667 MPa
f_ck.orig = 40000000 Pa
σ_s(ε_1, f_yd) :=
    if |ε_1| ≤ f_yd/E_s
        E_s*ε_1
    else
        f_yd*ε_1/|ε_1|
x_0 := B_y.min = -195 mm
x_1 := B_y.max = 195 mm
ε_c.m :=
    if C_model == 2
        ε_c2(f_ck)
    else
        ε_c3(f_ck)
    = 0.00175
ε_cu.m :=
    if C_model == 2
        ε_cu2(f_ck)
    else
        ε_cu3(f_ck)
    = 0.0035
y_0
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(0)
(1)
y_1
hj_one := ones(length(Rebars_A;s)) = [1; 1; 1; 1; 1; 1; 1; 1]
M := B_koords/m = [0, -0.195; 0, 0.195; 0.39, 0.195; 0.39, -0.195]
M :=
    for i ∈ 1 .. rows(M)
        M[i, 3] ← M[i, 1]*10000 + M[i, 2]
        M
csort(M, 2) = [0, -0.195, -0.195; 0.39, -0.195, 3899.8; 0, 0.195, 0.195; 0.39, 0.195, 3900.2]
M := csort(M, 3) = [0, -0.195, -0.195; 0, 0.195, 0.195; 0.39, -0.195, 3899.8; 0.39, 0.195, 3900.2]
csort(csort(M, 2), 1) = [0, 0.195, 0.195; 0, -0.195, -0.195; 0.39, -0.195, 3899.8; 0.39, 0.195, 3900.2]
M := submatrix(M, 1, rows(M), 1, 2) = [0, -0.195; 0, 0.195; 0.39, -0.195; 0.39, 0.195]
M = [0, -0.195; 0, 0.195; 0.39, -0.195; 0.39, 0.195]
M :=
    TK ← 0
    for i ∈ 1 .. rows(M)
        for j ∈ 1 .. cols(M)
            TK[i, j] ← round(M[i, j]*100000000, 1)/100000000
            TK
        TK
    TK
M = [0, -0.195; 0, 0.195; 0.39, -0.195; 0.39, 0.195]
M_f := M_FunktBase(M) = [[0, 0.195; 0.39, 0.195]; [0, -0.195; 0.39, -0.195]; [0.195; 0]; [-0.195; 0]]
fup(x) := min([1, x]*M_f[3])
fdown(x) := max([1, x]*M_f[4])
σ_c(ε_c, ε_c.m, ε_cu.m, f_cd) :=
    if C_model == 2
        σ_c2(ε_c, ε_c.m, ε_cu.m, f_cd)
    else
        σ_c3(ε_c, ε_c.m, ε_cu.m, f_cd)
# Congrete
N_con.com(y_0, y_1) := integral(integral(σ_c(f_line(min(M[:, 2]), y_0, max(M[:, 2]), y_1, Y), ε_c.m, ε_cu.m, f_cd/Pa), Y = fdown(X) .. fup(X)), X = min(M[:, 1]) .. max(M[:, 1]))*Pa*m^2 - {
    for i ∈ 1 .. rows(Rebars_P;s)
        ret[i] ← σ_c(f_line(B_y.min, y_0, B_y.max, y_1, Rebars_P;s[i, :]*[1]), ε_c.m, ε_cu.m, f_cd/Pa)*Rebars_A;s[i, :]*[1]
    ret*hj_one
}*Pa*tkb
N_con.st(y_0, y_1) :=
    for i ∈ 1 .. rows(Rebars_P;s)
        ret[i] ← σ_s(f_line(B_y.min, y_0, B_y.max, y_1, Rebars_P;s[i, :]*[1]), f_yd)*Rebars_A;s[i, :]*[1]
    ret*hj_one
N_con(y_0, y_1) := N_con.com(y_0, y_1) + N_con.st(y_0, y_1)
M = [0, -0.195; 0, 0.195; 0.39, -0.195; 0.39, 0.195]
MN_con.com;W(y_0, y_1) := integral(integral(σ_c(f_line(min(M[:, 2]), y_0, max(M[:, 2]), y_1, Y), ε_c.m, ε_cu.m, f_cd/Pa)*Y, Y = fdown(X) .. fup(X)), X = min(M[:, 1]) .. max(M[:, 1]))*Pa*m^3*(-1) + {
    for i ∈ 1 .. rows(Rebars_P;s)
        ret[i] ← σ_c(f_line(B_y.min, y_0, B_y.max, y_1, Rebars_P;s[i, :]*[1]), ε_c.m, ε_cu.m, f_cd/Pa)*Pa*Rebars_A;s[i, :]*[1]*Rebars_P;s[i, :]*[1]
    ret*hj_one
}*tkb
MN_con.st;W(y_0, y_1) :=
    for i ∈ 1 .. rows(Rebars_P;s)
        ret[i] ← σ_s(f_line(B_y.min, y_0, B_y.max, y_1, Rebars_P;s[i, :]*[1]), f_yd)*Rebars_A;s[i, :]*[1]*Rebars_P;s[i, :]*[1]
    ret*hj_one*(-1)
MN_con.W(y_0, y_1) := MN_con.com;W(y_0, y_1) + MN_con.st;W(y_0, y_1)
tt(y_0, y_1) :=
    Result ← [N_con(y_0, y_1); MN_con.W(y_0, y_1); N_con.com(y_0, y_1); 1; 1; N_con.st(y_0, y_1); 1; 1; y_0; y_1]
MN_con.com;W(0.001615, 0.001615) = 0 J
tts(y_0, ε_s) :=
    y_1 ← f_line(x_0, y_0, b - r_e, ε_s, x_1)
    result ← tt(y_0, y_1)
    result
# Funktio jolla saa ajettua betonin puristumalla ja ht venymällä
# Positiivinen on puristus
# nolla on betonin puristus puoli
# 1 on terästen vetopuoli
tr1 := 40
tr2 := 20
ε_su := -0.01
CPoints :=
    out[1, :] ← [ε_c.m, ε_c.m]
    out[2, :] ← [ε_cu.m, 0]
    for i ∈ 0, ε_su/tr1 .. ε_su
        out[rows(out) + 1, :] ← [ε_cu.m, i]
    for i ∈ ε_cu.m, ε_cu.m - (ε_cu.m - ε_su)/tr2 .. ε_su
        out[rows(out) + 1, :] ← [i, ε_su]
    out
rows(CPoints) = 64
tulos :=
    for x ∈ 1 .. rows(CPoints)
        tulo[:, x] ← tts(CPoints[x, :][:, 1]*[1], CPoints[x, :][:, 2]*[1])
        tulo
tulos = [
    5648746 N, 5332442 N, 5332442 N, 5127224 N, 4911393 N, 4686578 N, 4454486 N, 4230467 N, 4022325 N, 3827852 N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;
    0 J, 91004.6 J, 91004.6 J, 114585 J, 138574 J, 162775 J, 187027 J, 208601 J, 226443 J, 241381 J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;
    3924640 N, 3520566 N, 3520566 N, 3385570 N, 3239960 N, 3085367 N, 2923497 N, 2769700 N, 2631779 N, 2507528 N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;
    1, 1, 1, 1, 1, 1, 1, 1, 1, 1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;
    1, 1, 1, 1, 1, 1, 1, 1, 1, 1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;
    1724106 N, 1811876 N, 1811876 N, 1741654 N, 1671432 N, 1601211 N, 1530989 N, 1460767 N, 1390546 N, 1320324 N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;
    1, 1, 1, 1, 1, 1, 1, 1, 1, 1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;
    1, 1, 1, 1, 1, 1, 1, 1, 1, 1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;
    0.00175, 0.0035, 0.0035, 0.0035, 0.0035, 0.0035, 0.0035, 0.0035, 0.0035, 0.0035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;
    0.00175, 0.000761785, 0.000761785, 0.000566199, 0.000370612, 0.000175025, -2.05617e-5, -0.000216148, -0.000411735, -0.000607322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]
tts(CPoints[x, :][:, 1]*[1], CPoints[x, :][:, 2]*[1]) =  # error: This variable is undefined. Check that the label is set correctly.
tty := tulos[1, :]/kN
tulos[1, :] = [
    5648.75, 5332.44, 5332.44, 5127.22, 4911.39, 4686.58, 4454.49, 4230.47, 4022.32, 3827.85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] kN
ttx := tulos[2, :]/(kN*m)
tulos[2, :] = [
    0, 91.0046, 91.0046, 114.585, 138.574, 162.775, 187.027, 208.601, 226.443, 241.381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] kN*m
tulosS[2, :] := tty
tulosS[1, :] := ttx
max(tulos[1, :]) = 5648.75 kN
min(tulos[1, :]) = -2141.75 kN
max(tulos[2, :]) = 326.252 kN*m
min(tulos[2, :]) = 0 J
# Centrum
Cent_suora := READEXCEL(".\Centrum 350 myyt1.xls.xlsx", "suora!D3:E202")
Cent_vino := READEXCEL(".\Centrum 350 myyt1.xls.xlsx", "Vino!D3:E202")
# Paalu RTC-350-16
RTB350C16_suora := READEXCEL(".\Centrum 350 myyt1.xls.xlsx", "Paalu RTC-350-16!A1:B53")
RTB350C16_vino := READEXCEL(".\Centrum 350 myyt1.xls.xlsx", "Paalu RTC-350-16!C1:D53")
# Paalu RTC-300-16
RTB300C16_suora := READEXCEL(".\Centrum 350 myyt1.xls.xlsx", "Paalu RTC-300-16!A1:B53")
RTB300C16_vino := READEXCEL(".\Centrum 350 myyt1.xls.xlsx", "Paalu RTC-300-16!C1:D53")
# Paalu RTB-300-16
RTB300B16_suora := READEXCEL(".\Centrum 350 myyt1.xls.xlsx", "Paalu RTB-300-16!A1:B53")
RTB300B16_vino := READEXCEL(".\Centrum 350 myyt1.xls.xlsx", "Paalu RTB-300-16!C1:D53")
# Paalu RTB-250-16
RTB250B16_suora := READEXCEL(".\Centrum 350 myyt1.xls.xlsx", "Paalu RTB-250-16!A1:B53")
RTB250B16_vino := READEXCEL(".\Centrum 350 myyt1.xls.xlsx", "Paalu RTB-250-16!C1:D53")
Cent :=
    if check == 0
        [0, 0; 0, 0]
    else if check == 1
        Cent_suora
    else if check == 2
        RTB350C16_suora
    else if check == 3
        RTB300C16_suora
    else if check == 4
        RTB300B16_suora
    else if check == 5
        RTB250B16_suora
B_x.min = 0 m
B_x.max = 0.39 m
ix := B_x.min/m, (B_x.max - B_x.min)/(20*m) + B_x.min/m .. B_x.max/m
ix = [0; 0.0195; 0.039; 0.0585; 0.078; 0.0975; 0.117; 0.1365; 0.156; 0.1755; 0.195; 0.2145; 0.234; 0.2535; 0.273; 0.2925; 0.312; 0.3315; 0.351; 0.3705; 0.39]
Rebars_Koords = [
    0.125, 0.1085;
    0.265, 0.1085;
    0.125, -0.1085;
    0.265, -0.1085;
    0.0865, 0.07;
    0.3035, 0.07;
    0.0865, -0.07;
    0.3035, -0.07
] m
# [chart]
    Y[1] := fup(ix)
    X[3] := (Rebars_Koords/m)[:, 1]
    X[1] := ix
    X[2] := ix
    Y[2] := fdown(ix)
    Y[3] := (Rebars_Koords/m)[:, 2]
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tty = [
    5648.75, 5332.44, 5332.44, 5127.22, 4911.39, 4686.58, 4454.49, 4230.47, 4022.32, 3827.85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]
# [chart]
    X[1] := transpose(ttx)
    Y[1] := transpose(tty)
    X[2] := Cent[:, 2]
    Y[2] := Cent[:, 1]
# Lasketaan nollan leikkaus
j :=
    for i ∈ 1 .. cols(transpose(Cent)[1, :])
        if 0 > transpose(Cent)[1, i]
            i
            break
        i
    = 2  # disabled
x.1 := transpose(Cent)[2, j] = 0  # disabled
y.1 := transpose(Cent)[1, j] = 0  # disabled
x.2 := transpose(Cent)[2, j - 1] = 0  # disabled
y.2 := transpose(Cent)[1, j - 1] = 0  # disabled
[a_l; b_l] := line([x.1; x.2], [y.1; y.2])  # error: Found a number with a magnitude greater than 10^307 while trying to evaluate this expression. Mathcad can not assign numbers greater than 10^307.; disabled
nollakCent := -a_l/b_l  # error: This variable is undefined. Check that the label is set correctly.; disabled
j :=
    for i ∈ 1 .. cols(tulosS[1, :])
        if 0 > tulosS[2, i]
            i
            break
        i
    = 45
x.1 := tulosS[1, j] = 225.473
y.1 := tulosS[2, j] = -242.451
x.2 := tulosS[1, j - 1] = 271.894
y.2 := tulosS[2, j - 1] = 226.708
[a_l; b_l] := line([x.1; x.2], [y.1; y.2]) = [-2521.21; 10.1066]
nollak := -a_l/b_l = 249.462
resultsDirect := [round(max(tulosS[2, :])), round(min(tulosS[2, :])), round(max(tulosS[1, :])), round(nollak)] = [5649, -2142, 326, 249]
pointDirect := tulosS = [
    0, 91.0046, 91.0046, 114.585, 138.574, 162.775, 187.027, 208.601, 226.443, 241.381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;
    5648.75, 5332.44, 5332.44, 5127.22, 4911.39, 4686.58, 4454.49, 4230.47, 4022.32, 3827.85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]
f_yk.orig = 500000000 Pa
f_yk = 500000000 Pa
clear(tulos, tty, ttx, nollak)
XXXXXXXXXXXXXXXXXXXXXXXXXXXXXXXXXXXXXXXXXXXXXXXXXXXXXXXXXXXXXXXXX
α := 45 deg  # list choice: 0 = 0, 45 = 45 = 45 deg
f_yk := f_yk.orig = 500 MPa
f_ck := f_ck.orig = 40 MPa
f_ck.orig = 40000000 Pa
B_koords := B_koords.orig
B_koords = [0, -0.195; 0, 0.195; 0.39, 0.195; 0.39, -0.195] m
lv_1.special := 60*mm
Rebars_Koords := Rebars_Koords.orig = [
    0.125, 0.1085;
    0.265, 0.1085;
    0.125, -0.1085;
    0.265, -0.1085;
    0.0865, 0.07;
    0.3035, 0.07;
    0.0865, -0.07;
    0.3035, -0.07
] m
Rebars_A;s := Rebars_A;s.orig = [615.752; 615.752; 615.752; 615.752; 615.752; 615.752; 615.752; 615.752] mm^2
Rebars_Koords = [125, 108.5; 265, 108.5; 125, -108.5; 265, -108.5; 86.5, 70; 303.5, 70; 86.5, -70; 303.5, -70] mm
R(α) := [cos(α), sin(α); -sin(α), cos(α)]
B_koords := R(α)*transpose(B_koords)
Rebars_Koords := R(α)*transpose(Rebars_Koords)
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B_koords := transpose(B_koords) = [-137.886, -137.886; 137.886, 137.886; 413.657, -137.886; 137.886, -413.657] mm
Rebars_Koords := transpose(Rebars_Koords) = [
    165.109, -11.6673;
    264.104, -110.662;
    11.6673, -165.109;
    110.662, -264.104;
    110.662, -11.6673;
    264.104, -165.109;
    11.6673, -110.662;
    165.109, -264.104
] mm
Y_move := (max(B_koords[:, 2]) + min(B_koords[:, 2]))/2 = -0.137886 m
X_move := min(B_koords[:, 1]) = -0.137886 m
B_koords := MsubCV(B_koords, 2, -Y_move)
Rebars_Koords := MsubCV(Rebars_Koords, 2, -Y_move)
B_koords := MsubCV(B_koords, 1, -X_move)
Rebars_Koords := MsubCV(Rebars_Koords, 1, -X_move)
B_koords = [0, 0; 275.772, 275.772; 551.543, 0; 275.772, -275.772] mm
Rebars_P;s := Rebars_Koords[:, 2] = [126.219; 27.2236; -27.2236; -126.219; 126.219; -27.2236; 27.2236; -126.219] mm
B_x.max := max(B_koords[:, 1]) = 0.551543 m
B_y.max := max(B_koords[:, 2]) = 0.275772 m
B_x.min := min(B_koords[:, 1]) = 0 m
B_y.min := min(B_koords[:, 2]) = -0.275772 m
f_yk := f_yk*μ_s = 500 MPa
f_ck := f_ck*μ_c*μ_p = 40 MPa
f_yd := f_yk/γ_s = 434.783 MPa
f_cd := α_cc*f_ck/γ_c = 26.6667 MPa
σ_s(ε_1, f_yd) :=
    if |ε_1| ≤ f_yd/E_s
        E_s*ε_1
    else
        f_yd*ε_1/|ε_1|
x_0 := B_y.min = -275.772 mm
x_1 := B_y.max = 275.772 mm
ε_c.m :=
    if C_model == 2
        ε_c2(f_ck)
    else
        ε_c3(f_ck)
    = 0.00175
ε_cu.m :=
    if C_model == 2
        ε_cu2(f_ck)
    else
        ε_cu3(f_ck)
    = 0.0035
y_0
(0)
(1)
y_1
hj_one := ones(length(Rebars_A;s)) = [1; 1; 1; 1; 1; 1; 1; 1]
f_ck.orig = 40000000 Pa
M := B_koords/m = [0, 0; 0.275772, 0.275772; 0.551543, 0; 0.275772, -0.275772]
M :=
    for i ∈ 1 .. rows(M)
        M[i, 3] ← M[i, 1]*10000 + M[i, 2]
        M
csort(M, 2) = [0.275772, -0.275772, 2757.44; 0, 0, 0; 0.551543, 0, 5515.43; 0.275772, 0.275772, 2757.99]
M := csort(M, 3) = [0, 0, 0; 0.275772, -0.275772, 2757.44; 0.275772, 0.275772, 2757.99; 0.551543, 0, 5515.43]
csort(csort(M, 2), 1) = [0, 0, 0; 0.275772, 0.275772, 2757.99; 0.275772, -0.275772, 2757.44; 0.551543, 0, 5515.43]
M := submatrix(M, 1, rows(M), 1, 2) = [0, 0; 0.275772, -0.275772; 0.275772, 0.275772; 0.551543, 0]
M = [0, 0; 0.275772, -0.275772; 0.275772, 0.275772; 0.551543, 0]
M :=
    TK ← 0
    for i ∈ 1 .. rows(M)
        for j ∈ 1 .. cols(M)
            TK[i, j] ← round(M[i, j]*100000000, 1)/100000000
            TK
        TK
    TK
M = [0, 0; 0.275772, -0.275772; 0.275772, 0.275772; 0.551543, 0]
M_f := M_FunktBase(M) = [
    [0, 0; 0.275772, 0.275772; 0.551543, 0]; [0, 0; 0.275772, -0.275772; 0.551543, 0]; [0, 0.551543; 1, -1]; [0, -0.551543; -1, 1]
]
fup(x) := min([1, x]*M_f[3])
fdown(x) := max([1, x]*M_f[4])
σ_c(ε_c, ε_c.m, ε_cu.m, f_cd) :=
    if C_model == 2
        σ_c2(ε_c, ε_c.m, ε_cu.m, f_cd)
    else
        σ_c3(ε_c, ε_c.m, ε_cu.m, f_cd)
# Congrete
N_con.com(y_0, y_1) := integral(integral(σ_c(f_line(min(M[:, 2]), y_0, max(M[:, 2]), y_1, Y), ε_c.m, ε_cu.m, f_cd/Pa), Y = fdown(X) .. fup(X)), X = min(M[:, 1]) .. max(M[:, 1]))*Pa*m^2 - {
    for i ∈ 1 .. rows(Rebars_P;s)
        ret[i] ← σ_c(f_line(B_y.min, y_0, B_y.max, y_1, Rebars_P;s[i, :]*[1]), ε_c.m, ε_cu.m, f_cd/Pa)*Rebars_A;s[i, :]*[1]
    ret*hj_one
}*Pa*tkb
N_con.st(y_0, y_1) :=
    for i ∈ 1 .. rows(Rebars_P;s)
        ret[i] ← σ_s(f_line(B_y.min, y_0, B_y.max, y_1, Rebars_P;s[i, :]*[1]), f_yd)*Rebars_A;s[i, :]*[1]
    ret*hj_one
N_con(y_0, y_1) := N_con.com(y_0, y_1) + N_con.st(y_0, y_1)
M = [0, 0; 0.275772, -0.275772; 0.275772, 0.275772; 0.551543, 0]
MN_con.com;W(y_0, y_1) := integral(integral(σ_c(f_line(min(M[:, 2]), y_0, max(M[:, 2]), y_1, Y), ε_c.m, ε_cu.m, f_cd/Pa)*Y, Y = fdown(X) .. fup(X)), X = min(M[:, 1]) .. max(M[:, 1]))*Pa*m^3*(-1) + {
    for i ∈ 1 .. rows(Rebars_P;s)
        ret[i] ← σ_c(f_line(B_y.min, y_0, B_y.max, y_1, Rebars_P;s[i, :]*[1]), ε_c.m, ε_cu.m, f_cd/Pa)*Pa*Rebars_A;s[i, :]*[1]*Rebars_P;s[i, :]*[1]
    ret*hj_one
}*tkb
MN_con.st;W(y_0, y_1) :=
    for i ∈ 1 .. rows(Rebars_P;s)
        ret[i] ← σ_s(f_line(B_y.min, y_0, B_y.max, y_1, Rebars_P;s[i, :]*[1]), f_yd)*Rebars_A;s[i, :]*[1]*Rebars_P;s[i, :]*[1]
    ret*hj_one*(-1)
MN_con.W(y_0, y_1) := MN_con.com;W(y_0, y_1) + MN_con.st;W(y_0, y_1)
tt(y_0, y_1) :=
    Result ← [N_con(y_0, y_1); MN_con.W(y_0, y_1); N_con.com(y_0, y_1); 1; 1; N_con.st(y_0, y_1); 1; 1; y_0; y_1]
MN_con.com;W(0.001615, 0.001615) = -9.09495e-13 J
tts(y_0, ε_s) :=
    y_1 ← f_line(x_0, y_0, b - r_e, ε_s, x_1)
    result ← tt(y_0, y_1)
    result
# Funktio jolla saa ajettua betonin puristumalla ja ht venymällä
# Positiivinen on puristus
# nolla on betonin puristus puoli
# 1 on terästen vetopuoli
tr1 := 40
tr2 := 20
ε_su := -0.01
CPoints :=
    out[1, :] ← [ε_c.m, ε_c.m]
    out[2, :] ← [ε_cu.m, 0]
    for i ∈ 0, ε_su/tr1 .. ε_su
        out[rows(out) + 1, :] ← [ε_cu.m, i]
    for i ∈ ε_cu.m, ε_cu.m - (ε_cu.m - ε_su)/tr2 .. ε_su
        out[rows(out) + 1, :] ← [i, ε_su]
    out
rows(CPoints) = 64
tulos :=
    for x ∈ 1 .. rows(CPoints)
        tulo[:, x] ← tts(CPoints[x, :][:, 1]*[1], CPoints[x, :][:, 2]*[1])
        tulo
tulos = [
    5648746 N, 5090099 N, 5090099 N, 4814591 N, 4524824 N, 4232232 N, 3942476 N, 3659457 N, 3385129 N, 3111432 N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;
    1.72804e-11 J, 114687 J, 114687 J, 138743 J, 161948 J, 182802 J, 200687 J, 215552 J, 227632 J, 236688 J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;
    3924640 N, 3387520 N, 3387520 N, 3213371 N, 3024962 N, 2833729 N, 2645331 N, 2463671 N, 2290701 N, 2125586 N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;
    1, 1, 1, 1, 1, 1, 1, 1, 1, 1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;
    1, 1, 1, 1, 1, 1, 1, 1, 1, 1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;
    1724106 N, 1702579 N, 1702579 N, 1601220 N, 1499862 N, 1398503 N, 1297145 N, 1195787 N, 1094428 N, 985846 N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;
    1, 1, 1, 1, 1, 1, 1, 1, 1, 1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;
    1, 1, 1, 1, 1, 1, 1, 1, 1, 1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;
    0.00175, 0.0035, 0.0035, 0.0035, 0.0035, 0.0035, 0.0035, 0.0035, 0.0035, 0.0035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;
    0.00175, 0.000167537, 0.000167537, -7.04964e-5, -0.00030853, -0.000546563, -0.000784596, -0.00102263, -0.00126066, -0.00149869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]
tts(CPoints[x, :][:, 1]*[1], CPoints[x, :][:, 2]*[1]) =  # error
tty := tulos[1, :]/kN
tulos[1, :] = [
    5648.75, 5090.1, 5090.1, 4814.59, 4524.82, 4232.23, 3942.48, 3659.46, 3385.13, 3111.43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] kN
ttx := tulos[2, :]/(kN*m)
tulos[2, :] = [
    0, 114.687, 114.687, 138.743, 161.948, 182.802, 200.687, 215.552, 227.632, 236.688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] kN*m
tulosV[2, :] := tty
tulosV[1, :] := ttx
max(tulos[1, :]) = 5648.75 kN
min(tulos[1, :]) = -2141.75 kN
max(tulos[2, :]) = 252.464 kN*m
min(tulos[2, :]) = -2.18279e-11 J
Cent_suora := READEXCEL(".\Centrum 350 myyt1.xls.xlsx", "suora!D3:E202")
Cent_vino := READEXCEL(".\Centrum 350 myyt1.xls.xlsx", "Vino!D3:E202")
Cent :=
    if check == 0
        [0, 0; 0, 0]
    else if check == 1
        Cent_vino
    else if check == 2
        RTB350C16_vino
    else if check == 3
        RTB300C16_vino
    else if check == 4
        RTB300B16_vino
    else if check == 5
        RTB250B16_vino
f_ck.orig = 40000000 Pa
B_x.min = 0 m
B_x.max = 0.551543 m
ix := B_x.min/m, (B_x.max - B_x.min)/(20*m) + B_x.min/m .. B_x.max/m
ix = [0; 0.0275772; 0.0551543; 0.0827315; 0.110309; 0.137886; 0.165463; 0.19304; 0.220617; 0.248194; 0.275772; 0.303349; 0.330926; 0.358503; 0.38608; 0.413657; 0.441235; 0.468812; 0.496389; 0.523966; 0.551543]
Rebars_Koords = [
    0.302995, 0.126219;
    0.40199, 0.0272236;
    0.149553, -0.0272236;
    0.248548, -0.126219;
    0.248548, 0.126219;
    0.40199, -0.0272236;
    0.149553, 0.0272236;
    0.302995, -0.126219
] m
# [chart]
    Y[1] := fup(ix)
    X[3] := (Rebars_Koords/m)[:, 1]
    X[1] := ix
    X[2] := ix
    Y[2] := fdown(ix)
    Y[3] := (Rebars_Koords/m)[:, 2]
# [chart]
    X[1] := transpose(ttx)
    Y[1] := transpose(tty)
    X[2] := Cent[:, 2]
    Y[2] := Cent[:, 1]
45
# Lasketaan nollan leikkaus
j :=
    for i ∈ 1 .. cols(transpose(Cent)[1, :])
        if 0 > transpose(Cent)[1, i]
            i
            break
        i
    = 2  # disabled
x.1 := transpose(Cent)[2, j] = 0  # disabled
y.1 := transpose(Cent)[1, j] = 0  # disabled
x.2 := transpose(Cent)[2, j - 1] = 0  # disabled
y.2 := transpose(Cent)[1, j - 1] = 0  # disabled
[a_l; b_l] := line([x.1; x.2], [y.1; y.2])  # error: Found a number with a magnitude greater than 10^307 while trying to evaluate this expression. Mathcad can not assign numbers greater than 10^307.; disabled
nollakCent := -a_l/b_l  # error: This variable is undefined. Check that the label is set correctly.; disabled
j :=
    for i ∈ 1 .. cols(tulosV[1, :])
        if 0 > tulosV[2, i]
            i
            break
        i
    = 27
tulosV = [
    0, 114.687, 114.687, 138.743, 161.948, 182.802, 200.687, 215.552, 227.632, 236.688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;
    5648.75, 5090.1, 5090.1, 4814.59, 4524.82, 4232.23, 3942.48, 3659.46, 3385.13, 3111.43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]
x.1 := tulosV[1, j] = 218.026
y.1 := tulosV[2, j] = -92.3869
x.2 := tulosV[1, j - 1] = 223.682
y.2 := tulosV[2, j - 1] = 19.7553
[a_l; b_l] := line([x.1; x.2], [y.1; y.2]) = [-4415.62; 19.8289]
nollak := -a_l/b_l = 222.686
tulosV = [
    0, 114.687, 114.687, 138.743, 161.948, 182.802, 200.687, 215.552, 227.632, 236.688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;
    5648.75, 5090.1, 5090.1, 4814.59, 4524.82, 4232.23, 3942.48, 3659.46, 3385.13, 3111.43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]
resultsBiAX := [round(max(tulosV[2, :])), round(min(tulosV[2, :])), round(max(tulosV[1, :])), round(nollak)] = [5649, -2142, 252, 223]
pointBiAX := tulosV = [
    0, 114.687, 114.687, 138.743, 161.948, 182.802, 200.687, 215.552, 227.632, 236.688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;
    5648.75, 5090.1, 5090.1, 4814.59, 4524.82, 4232.23, 3942.48, 3659.46, 3385.13, 3111.43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]
# Yhteiset tulostukset
setupvalues := [
    "Name", Product;
    "b [mm]", b/mm;
    "l.v1[mm]", l_v1/mm;
    "l.v2[mm]", l_v2/mm;
    "f.yk[MPa]", f_yk.orig/MPa;
    "E.s[GPA]", E_s/GPa;
    "ϕ[mm]", ϕ_orig/mm;
    "ϕ.eff[mm]", round(ϕ_eff/mm, 2);
    "f.ck[MPa]", f_ck.orig/MPa;
    "α.cc", α_cc;
    "γ.s", γ_s;
    "γ.c", γ_c;
    "μ.p", μ_p;
    "μ.s", μ_s;
    "μ.c", μ_c;
    "", "";
    "tkb", tkb;
    "Cmodel", C_model;
    "RB.m", RB_m
] = [
    "Name", "400-217-140 8D28-960 -";
    "b [mm]", 390;
    "l.v1[mm]", 217;
    "l.v2[mm]", 140;
    "f.yk[MPa]", 500;
    "E.s[GPA]", 200;
    "ϕ[mm]", 28;
    "ϕ.eff[mm]", 28;
    "f.ck[MPa]", 40;
    "α.cc", 1;
    "γ.s", 1.15;
    "γ.c", 1.5;
    "μ.p", 1;
    "μ.s", 1;
    "μ.c", 1;
    "", "";
    "tkb", 1;
    "Cmodel", 3;
    "RB.m", 1
]
filename := "Datashee3.xlsx"
Results1 := ["N.max[kN]", "N.min[kN]", "Nm.max[kNm]", "Nm.0kN[kNm]"]
Results1[2, :] := resultsDirect
Results1[3, :] := resultsBiAX
Results2 := pointDirect
t := 1 = 1
Results2[3, :] := pointBiAX
ChartData := transpose(augment(transpose(tulosS), transpose(tulosV))) = [
    0, 91.0046, 91.0046, 114.585, 138.574, 162.775, 187.027, 208.601, 226.443, 241.381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;
    5648.75, 5332.44, 5332.44, 5127.22, 4911.39, 4686.58, 4454.49, 4230.47, 4022.32, 3827.85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;
    0, 114.687, 114.687, 138.743, 161.948, 182.802, 200.687, 215.552, 227.632, 236.688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;
    5648.75, 5090.1, 5090.1, 4814.59, 4524.82, 4232.23, 3942.48, 3659.46, 3385.13, 3111.43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]
Tiedot := concat(Product, " ", ", fii=", num2str(round(ϕ_orig/mm, 2)), ", fii.eff=", num2str(round(ϕ_eff/mm, 2)), ", lv1=", num2str(l_v1/mm), ", lv2=", num2str(l_v2/mm), ", μs=", num2str(μ_s), ", μc=", num2str(μ_c), ", μp=", num2str(μ_p), ", tkb=", num2str(tkb), ", Cm=", num2str(C_model))
Tiedot = "400-217-140 8D28-960 - , fii=28, fii.eff=28, lv1=217, lv2=140, μs=1, μc=1, μp=1, tkb=1, Cm=3"
[
    "Name", Product;
    "b", b/mm;
    "lv", l_v1/mm;
    "lv2", l_v2/mm;
    "fyk", f_yk/MPa;
    "Es", E_s/GPa;
    "fii", ϕ_orig/mm;
    "fiieff", round(ϕ_eff/mm, 2);
    "fck", f_ck/MPa;
    "alphaCC", α_cc;
    "gammaS", γ_s;
    "gammaC", γ_c;
    "gammaP", μ_p;
    "myyS", μ_s;
    "myyC", μ_c;
    "tkb", tkb;
    "Cmodel", C_model;
    "RBm", RB_m;
    "Nmax", Results1[2, 1];
    "Nmin", Results1[2, 2];
    "NMmax", min([Results1[2, 3]; Results1[3, 3]]);
    "NM0kN", min([Results1[2, 4]; Results1[3, 4]]);
    "NMdirect", Results1[2, 3];
    "NMbiax", Results1[3, 3];
    "NM0kNdirect", Results1[2, 4];
    "NM0kNbiax", Results1[3, 4]
]
toCSV := [
    "Nimi", Product;
    "b", b/mm;
    "lv", l_v1/mm;
    "lv2", l_v2/mm;
    "fyk", f_yk.orig/MPa;
    "Es", E_s/GPa;
    "fii", ϕ_orig/mm;
    "fiieff", round(ϕ_eff/mm, 2);
    "fck", f_ck.orig/MPa;
    "alphaCC", α_cc;
    "gammaS", γ_s;
    "gammaC", γ_c;
    "gammaP", μ_p;
    "myyS", μ_s;
    "myyC", μ_c;
    "tkb", tkb;
    "Cmodel", C_model;
    "RBm", RB_m;
    "Nmax", Results1[2, 1];
    "Nmin", Results1[2, 2];
    "NMmax", min([Results1[2, 3]; Results1[3, 3]]);
    "NM0kN", min([Results1[2, 4]; Results1[3, 4]]);
    "NMdirect", Results1[2, 3];
    "NMbiax", Results1[3, 3];
    "NM0kNdirect", Results1[2, 4];
    "NM0kNbiax", Results1[3, 4];
    "Kuvaaja1", "Direct";
    "Kuvaaja2", "Bi-direct";
    "Tiedot", Tiedot;
    "Kuva", kuva;
    "Lrb", L_rb/mm;
    "NmaxSLS", -1;
    "NminSLS", -1;
    "NMmaxSLS", -1
]
polku := "./"
polkuTemp := "./TempFiles/"
./Datasheet/TempFiles/
j := WRITECSV("./TempFiles/result.csv", ["TestName", Product]) = ["TestName", "400-217-140 8D28-960 -"]
FileName := concat(polkuTemp, Product, ".csv") = "./TempFiles/400-217-140 8D28-960 -.csv"
FileNameChart := concat(polkuTemp, Product, "-chart", ".csv") = "./TempFiles/400-217-140 8D28-960 --chart.csv"
j := WRITECSV(FileName, toCSV) = [
    "Nimi", "400-217-140 8D28-960 -";
    "b", 390;
    "lv", 217;
    "lv2", 140;
    "fyk", 500;
    "Es", 200;
    "fii", 28;
    "fiieff", 28;
    "fck", 40;
    "alphaCC", 1
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]
ChartData = [
    0, 91.0046, 91.0046, 114.585, 138.574, 162.775, 187.027, 208.601, 226.443, 241.381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;
    5648.75, 5332.44, 5332.44, 5127.22, 4911.39, 4686.58, 4454.49, 4230.47, 4022.32, 3827.85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;
    0, 114.687, 114.687, 138.743, 161.948, 182.802, 200.687, 215.552, 227.632, 236.688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;
    5648.75, 5090.1, 5090.1, 4814.59, 4524.82, 4232.23, 3942.48, 3659.46, 3385.13, 3111.43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]
j := WRITECSV(FileNameChart, ChartData) = [
    0, 91.0046, 91.0046, 114.585, 138.574, 162.775, 187.027, 208.601, 226.443, 241.381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;
    5648.75, 5332.44, 5332.44, 5127.22, 4911.39, 4686.58, 4454.49, 4230.47, 4022.32, 3827.85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;
    0, 114.687, 114.687, 138.743, 161.948, 182.802, 200.687, 215.552, 227.632, 236.688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;
    5648.75, 5090.1, 5090.1, 4814.59, 4524.82, 4232.23, 3942.48, 3659.46, 3385.13, 3111.43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]
B_koords.orig = [0, -195; 0, 195; 390, 195; 390, -195] mm
Rebars_Koords.orig = [125, 108.5; 265, 108.5; 125, -108.5; 265, -108.5; 86.5, 70; 303.5, 70; 86.5, -70; 303.5, -70] mm
FileNameBcoords := concat(polkuTemp, "bcoods.csv") = "./TempFiles/bcoods.csv"
FileNameRebardcoords := concat(polkuTemp, "Rebardcoods.csv")
j := WRITECSV(FileNameBcoords, B_koords.orig/mm) = [0, -195; 0, 195; 390, 195; 390, -195]
j := WRITECSV(FileNameRebardcoords, Rebars_Koords.orig/mm) = [125, 108.5; 265, 108.5; 125, -108.5; 265, -108.5; 86.5, 70; 303.5, 70; 86.5, -70; 303.5, -70]
f_ck = 40000000 Pa
f_ctk0.05(f_ck) = 2.45617 MPa
f_ctk0.95(f_ck) = 4.56147 MPa
E_cm(f_ck) = 35.2205 GPa
ε_c1(f_ck) = 0.00232425
ε_cu1(f_ck) = 0.0035
ε_c2(f_ck) = 0.002
ε_cu2(f_ck) = 0.0035
n(f_ck) = 2
ε_c3(f_ck) = 0.00175
ε_cu3(f_ck) = 0.0035
