# Worksheet setting: ORIGIN = 1
# Direct or diagonal
# Constrains
# Tämä on erityistapauksille
# esim. 2 lukkoinen
MYYC := 1  # disabled
0.800000  # disabled
MYYS := 1  # disabled
HTVÄLI1 := 104  # disabled
FCK := 50*MPa  # disabled
HTKOKO := 20  # list choice: 14mm = 14, 16mm = 16, 20mm = 20, 25mm = 25, 28mm = 28, 32mm = 32 = 20  # disabled
KOKO := 235  # disabled
B := 232  # disabled
diag := 0  # disabled  # Diag 0 = 0deg and 1 = 45 deg
[
    KOKO;
    B;
    HTVÄLI1;
    HTVÄLI2;
    HTKOKO;
    HTPIT;
    EMPTY;
    EMPTY;
    FCK;
    ALPHACC;
    EMPTY;
    MYYS;
    MYYC;
    MYYP;
    EMPTY;
    CLUKU
] := [235; 232; 80; 0; 20; 660; 0; 0; 60; 1; 0; 1; 1; 1; NaN; "DE"]
diag := 0  # 0 tai1
FCK := FCK*MPa = 60000000 Pa
kierot := 1
# kierot 0 normaali nelikukkoinen ja tallennus suoraan
# 1 tai 2 Epäsymmetrinen ja tallennus -1 tiedostoihin, joista koostetaan tulos
f_ck := FCK
btn := 1  # Reduce rebar area from congrere area
f_ck := f_ck*MYYC = 60000000 Pa
σ_lim.fck := 0.6
B := B*mm
E_s := 200*GPa
f_yk := 500*MPa
f_yk := f_yk*MYYS = 500000000 Pa
ϕ := HTKOKO*mm = 20 mm
lv := HTVÄLI1*mm = 0.08 m
α := 45*deg*diag + 0*deg = 0
diag = 0
E_c.effE_cm := 1/(1 + 1.6) = 0.384615
f_cm := f_ck + 8*MPa = 68 MPa
E_cm := 22*(f_cm/(MPa*10))^0.3*GPa = 39.0999 GPa  # Secant modulus of elasticity of concrete
f_ctm(f_ck) :=
    if (f_ck ≤ 50*MPa)
        0.3*(f_ck/MPa)^(2/3)*MPa
    else
        2.12*ln(1 + f_cm/(MPa*10))*MPa  # Mean value of axial tensile strength of concrete
f_ctm(f_ck) = 4354742 Pa
A_s := (ϕ/2)^2*π = 314.159 mm^2
# Turn matrix
turn(mat, dg) :=
    mat ← mat*[cos(α), sin(α); -sin(α), cos(α)]
    for ir ∈ 1 .. rows(mat)
        for ic ∈ 1 .. cols(mat)
            res[ir, ic] ← Round(mat[ir, ic], 0.0000000001*mm)
            res
        res
    res
b_coord := [-B/2, -B/2; B/2, -B/2; B/2, B/2; -B/2, B/2] = [-0.116, -0.116; 0.116, -0.116; 0.116, 0.116; -0.116, 0.116] m
b_coord.orig.min := min(b_coord[:, 2]) = -116 mm
b_coord := turn(b_coord, α) = [-116, -116; 116, -116; 116, 116; -116, 116] mm
[-lv/2, -lv/2; lv/2, lv/2]
[-lv/2, -lv/2; -lv/2, lv/2; lv/2, -lv/2; lv/2, lv/2]
Steel_coor := [-lv/2, -lv/2; -lv/2, lv/2; lv/2, -lv/2; lv/2, lv/2] = [-0.04, -0.04; -0.04, 0.04; 0.04, -0.04; 0.04, 0.04] m
Steel_coor :=
    if kierot == 1
        [-lv/2, lv/2; lv/2, -lv/2]
    else
        [-lv/2, -lv/2; lv/2, lv/2]
    = [-0.04, 0.04; 0.04, -0.04] m
Steel_coor.orig.min := min(Steel_coor[:, 2]) = -40 mm
c.cover := Steel_coor.orig.min - b_coord.orig.min - ϕ/2 = 66 mm
Steel_coor := turn(Steel_coor, α) = [-40, 40; 40, -40] mm
terasBetonista := min(Steel_coor[:, 2]) - b_coord.orig.min = 76 mm
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b_y.max := max(b_coord[:, 2]) = 116 mm
b_y.min := min(b_coord[:, 2]) = -116 mm
b_x.max := max(b_coord[:, 1]) = 0.116 m
b_x.min := min(b_coord[:, 1]) = -0.116 m
H := b_y.max - b_y.min = 232 mm
b_x.w := b_x.max - b_x.min = 232 mm
Steel_coor.Y := Steel_coor[:, 2] = [40; -40] mm
h_s.min := min(Steel_coor.Y) = -40 mm
# Total maximum compression congcrete
σ_c.tot.max := f_ck*σ_lim.fck = 36 MPa
# Total maximum congcrete strain
ε_c.max := f_ck*σ_lim.fck/(E_cm*E_c.effE_cm) = 0.00239387
# Total maximum steel strain
ε_s.max := f_yk/E_s = 0.0025
write := WRITEEXCEL("points.xlsx", ["e.c.max", ε_c.max; "e.s.max", ε_c.max], 1, 1, "C2") = ["e.c.max", 0.00239387; "e.s.max", 0.00239387]
# Equation for line
Fxline(x, x_1, y_1, x_2, y_2) :=
    [a; b] ← line([x_1; x_2], [y_1; y_2])
    a + b*x
# Equation for zero point
Fxline_0(x_1, y_1, x_2, y_2) :=
    [a; b] ← line([x_1; x_2], [y_1; y_2])
    -a/b
ε_x(x, ε_c.top, ε_c.bottom) := Fxline(x, b_y.max, ε_c.top, b_y.min, ε_c.bottom)  # Presetup for line function
ε_x0(ε_c.top, ε_c.bottom.st) := Fxline(b_y.min, b_y.max, ε_c.top, h_s.min, ε_c.bottom.st)
# Preset for calcultate concrete strain zero
# point, bottom based on bottom steel and top concrete strain
# Concrete stress based on strain
σ_c(ε) :=
    σ ← ε*E_cm*E_c.effE_cm
    if σ < 0*Pa
        σ ← 0*Pa
    σ
b_x.max.intg(x) :=
    if diag == 0
        b_x.max
    else
        if x < 0*mm
            b_y.max + x
        else
            b_y.max - x
b_x.min.intg(x) :=
    if diag == 0
        b_x.min
    else
        -b_x.max.intg(x)
VS := submatrix([1; 1; 1; 1; 1; 1; 1; 1], 1, rows(Steel_coor), 1, 1) = [1; 1]
N_Rd(ε_c.top, ε_c.bottom) := integral(integral(σ_c(ε_x(y, ε_c.top, ε_c.bottom)), x = b_x.min.intg(y) .. b_x.max.intg(y)), y = b_y.min .. b_y.max) + ε_x(Steel_coor.Y, ε_c.top, ε_c.bottom)*A_s*E_s*VS - {
    res ← 0
    for i ∈ 1 .. rows(Steel_coor.Y)
        res ← res + σ_c(ε_x(Steel_coor.Y[i], ε_c.top, ε_c.bottom))*A_s
    res
}*btn
M_Rd(ε_c.top, ε_c.bottom) := integral(integral(σ_c(ε_x(y, ε_c.top, ε_c.bottom))*y, x = b_x.min.intg(y) .. b_x.max.intg(y)), y = b_y.min .. b_y.max) + ε_x(Steel_coor.Y, ε_c.top, ε_c.bottom)*A_s*E_s*Steel_coor.Y - {
    res ← 0
    for i ∈ 1 .. rows(Steel_coor.Y)
        res ← res + σ_c(ε_x(Steel_coor.Y[i], ε_c.top, ε_c.bottom))*A_s*Steel_coor.Y[i]
    res
}*btn
ε_c.top.i := 0.0017923943 = 0.00179239
ε_c.bottom.i := -0.0038174676 = -0.00381747
X(ε_c.top, ε_c.bottom) :=
    if ε_c.top ≠ ε_c.bottom
        if ε_c.top > ε_c.bottom
            b_y.max - Fxline_0(b_y.max, ε_c.top, b_y.min, ε_c.bottom)
        else
            "err"
    else
        if ε_c.top > 0
            9999*km
        else
            -(9999*km)
ε_c.top.i := 0.0020923943 = 0.00209239
ε_c.bottom.i := -0.0028695468 = -0.00286955
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# image1
X(ε_c.top.i, ε_c.bottom.i) = 97.8318 mm
x_coord(ε_c.top, ε_c.bottom) :=
    if ε_c.top ≠ ε_c.bottom
        if ε_c.top > ε_c.bottom
            Fxline_0(b_y.max, ε_c.top, b_y.min, ε_c.bottom)
        else
            "err"
    else
        if ε_c.top > 0
            -9999*km
        else
            (9999*km)
x_coord(ε_c.top.i, ε_c.bottom.i) = 18.1682 mm
pb_coord := b_coord
pb_coord[5, 1] := b_coord[1, 1]
pb_coord[5, 2] := b_coord[1, 2]
MaxPPuristusalue :=
    if diag == 0
        min([-b_y.min; X(ε_c.top.i, ε_c.bottom.i)]*(b_x.max - b_x.min))
    else
        min([-b_y.min; X(ε_c.top.i, ε_c.bottom.i)]*(b_x.max - b_x.min))*1/2
MaxPuristusalue :=
    if diag == 0
        X(ε_c.top.i, ε_c.bottom.i)*(b_x.max - b_x.min)
    else
        X(ε_c.top.i, ε_c.bottom.i)*(b_x.max - b_x.min)*1/2
MaxPVetoalue :=
    if diag == 0
        max([-b_y.min; x_coord(ε_c.top.i, ε_c.bottom.i) - b_y.min]*(b_x.max - b_x.min))
    else
        min([-b_y.min; x_coord(ε_c.top.i, ε_c.bottom.i) - b_y.min]*(b_x.max - b_x.min))*1/2
pε := [
    ε_c.top.i, b_y.max/mm;
    ε_c.bottom.i, b_y.min/mm;
    0, b_y.min/mm;
    0, b_y.max/mm;
    ε_c.top.i, b_y.max/mm
]
# [chart]
    X[1] := pb_coord[:, 1]/mm
    Y[1] := pb_coord[:, 2]/mm
    X[2] := Steel_coor[:, 1]/mm
    Y[2] := Steel_coor[:, 2]/mm
# Taivutusreuna
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ε_c.top.i = 0.00209239
b_y.max/mm = 116
b_y.min = -0.116 m
X(ε_c.top.i, ε_c.bottom.i) = 97.8318 mm
x_coord(ε_c.top.i, ε_c.bottom.i) = 18.1682 mm
b_x.max = 0.116 m
# [chart]
    X[1] := pε[:, 1]
    Y[1] := pε[:, 2]
# Puristus
b_y.min/mm = -116
ε_c.bottom.i = -0.00286955
# Veto
PuristusKorkeus := b_y.max - x_coord(ε_c.top.i, ε_c.bottom.i) = 97.8318 mm
VetoKorkeus := x_coord(ε_c.top.i, ε_c.bottom.i) - b_y.min = 134.168 mm
MaxPPuristusalue = 22697 mm^2
MaxPVetoalue = 31127 mm^2
B^2 = 53824 mm^2
MaxPuristusalue = 22697 mm^2
MaxVetoalue := B^2 - MaxPuristusalue = 31127 mm^2
steppi := 0.0001
x_coord(ε_c.top.i, ε_c.bottom.i) = 18.1682 mm
N_Rd(ε_c.top.i, ε_c.bottom.i) = 306.061 kN
M_Rd(ε_c.top.i, ε_c.bottom.i) = 33.9908 kN*m
rround(AA, BB) :=
    if |AA - BB| < (1*10^-18)*SIUnitsOf(AA)
        AA
    else
        BB
# rround täytyy, olla koska points paikka laskussa on,jokkin niin, että ensimmäisen pisteen koorninaatteihin tulee erittäin pieni ero, joka rikkoo laskennan. Tämä ei tule aina mutta 265 - 139 on yksi ongelma. Tämä pyöristys voi korjata. Tarkastaa, että SLS halkeama leikkaa vetoa.
points :=
    nro ← 1
    step ← steppi
    top_start ← ε_c.max
    bottom_start ← ε_c.max
    top_end ← -ε_s.max
    bottom_end ← -ε_s.max
    points ← [top_start, bottom_start, top_start, bottom_start, nro]
    JJ ← WRITETEXT("g.txt", [top_start - 0.00177169735843, bottom_start - 0.00177169735843, top_start - bottom_start])
    bottom_ht ← bottom_start
    while bottom_ht ≥ bottom_end
        nro ← nro + 1
        points ← stack(points, [top_start, rround(top_start, ε_x0(top_start, bottom_ht)), top_start, bottom_ht, nro])
        bottom_ht ← bottom_ht - step
    points ← stack(points, [top_start, ε_x0(top_start, bottom_end), top_start, bottom_ht, nro])
    points
    top_c ← top_start
    while top_c > top_end
        nro ← nro + 1
        points ← stack(points, [top_c, ε_x0(top_c, bottom_end), top_c, bottom_end, nro])
        top_c ← top_c - step
    points ← stack(points, [top_end, bottom_end, top_end, bottom_end, nro])
    points
points[1, 1] = 0.00239387
N_Rd(points[1, 1], points[1, 2]) = 2215867 N
points[1, 2] = 0.00239387
resultV :=
    res ← [N_Rd(points[1, 1], points[1, 2])/kN, M_Rd(points[1, 1], points[1, 2])/(kN*m)]
    for x ∈ 2 .. rows(points)
        res ← stack(res, [N_Rd(points[x, 1], points[x, 2])/kN, M_Rd(points[x, 1], points[x, 2])/(kN*m)])
CentrumNoCrack := READEXCEL(".\CentrumPara  no crack.xlsx", "Sheet1!A1:B200")
CentrumNoCrackDiag := READEXCEL(".\CentrumDiagSLS.xlsx", "NoCrack!E4:F176")
Centrum04Crack := READEXCEL(".\urocodeapplied 270.xlsx", "Sheet2!Q2:R201")
Centrum04CrackDiag := READEXCEL(".\CentrumDiagSLS.xlsx", "04crack!E3:F175")
OmaReslutX := resultV[:, 2]
OmaReslutY := resultV[:, 1]
CentrumNoCrackD :=
    if diag == 0
        CentrumNoCrack
    else
        CentrumNoCrackDiag
Centrum04CrackD :=
    if diag == 0
        Centrum04Crack
    else
        Centrum04CrackDiag
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# [chart]
    X[1] := OmaReslutX
    Y[1] := OmaReslutY
    X[6] := Centrum04CrackD[:, 1]
    X[3] := CentrumNoCrackD[:, 1]
    Y[6] := Centrum04CrackD[:, 2]
    Y[3] := CentrumNoCrackD[:, 2]
# 7.3.4 Calculation of crack widths EN 1992-1-1
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W_k == s_r.max*Δε_m  # The crack width, wk, may be calculated from Expression (EN 1992-1-1 Eq 7.8)
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σ_s(ε_c.top, ε_c.bottom) := -min(ε_x(Steel_coor.Y, ε_c.top, ε_c.bottom)*E_s)
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# kt is a factor dependent on the duration of the load
# kt = 0,6 for short term loading
# kt = 0,4 for long term loading
k_t := 0.4
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f_ck = 60 MPa
# the mean value of the tensile strength of the concrete effective at the time
# when the cracks may first be expected to occur:
# fct,eff = fctm or lower, (fctm(t)), if cracking is expected earlier than 28 days
f_ct.eff := f_ctm(f_ck) = 4.35474 MPa
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# 1. Terästen painopisteestä puristavaan reunaan * 2.5
# 2. Tasapaino-akselista vetävään reunaan /3
# 3. Puolet halkaisijasta
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X(ε_c.top, ε_c.bottom)
h_c.eff(ε_c.top, ε_c.bottom) :=
    if diag == 0
        if X(ε_c.top, ε_c.bottom) > 0*mm
            min([2.5*terasBetonista; (H - X(ε_c.top, ε_c.bottom))/3; H/2])
        else
            min([2.5*terasBetonista; H/2])
    else
        H/2
terasBetonista = 76 mm
h_c.eff(ε_c.top, ε_c.bottom) :=
    if diag == 0
        min([2.5*terasBetonista; (H - X(ε_c.top, ε_c.bottom))/3; H/2])
    else
        H/2
terasBetonista = 76 mm
h_c.eff.coord(ε_c.top, ε_c.bottom) := b_y.min + h_c.eff(ε_c.top, ε_c.bottom)
h_c.eff(ε_c.top.i, ε_c.bottom.i) = 44.7227 mm
h_c.eff.coord(ε_c.top.i, ε_c.bottom.i) = -71.2773 mm
A_neliö(ε_c.top, ε_c.bottom) :=
    if diag == 0
        h_c.eff(ε_c.top, ε_c.bottom)*B
    else
        h_c.eff(ε_c.top, ε_c.bottom)^2
h_c.eff.coord(ε_c.top.i, ε_c.bottom.i) - b_y.min = 44.7227 mm
h_c.eff(ε_c.top.i, ε_c.bottom.i) = 44.7227 mm
A_neliö(ε_c.top.i, ε_c.bottom.i) = 10375.7 mm^2
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A_c.eff(ε_c.top, ε_c.bottom) := max([min([A_neliö(ε_c.top, ε_c.bottom); b_x.w*H*1/2]); 0*mm^2])
b_x.w = 0.232 m
X(ε_c.top.i, ε_c.bottom.i) = 97.8318 mm
A_c.eff(ε_c.top.i, ε_c.bottom.i) = 10375.7 mm^2
h_c.eff.coord(ε_c.top.i, ε_c.bottom.i) = -71.2773 mm
kjkkjllllllllllljjjklkljlkjlkljlkjlkjlkkl
Steel_coor.Y = [40; -40] mm
A_s.tension(ε_c.top, ε_c.bottom) :=
    tt ← 0*mm^2
    for i ∈ 1 .. rows(Steel_coor.Y)
        if x_coord(ε_c.top, ε_c.bottom) ≥ Steel_coor.Y[i]
            if 0*mm > Steel_coor.Y[i]
                tt ← tt + A_s
            if 0*mm == Steel_coor.Y[i]
                tt ← tt + A_s/2
            tt
        tt
    tt
x_coord(-0.002, -0.002) = 9999000000 mm
c = 299792458000 mm/s
A_s.tension(ε_c.top.i, ε_c.bottom.i) = 314.159 mm^2
ρ_p.eff(ε_c.top, ε_c.bottom) :=
    if A_c.eff(ε_c.top, ε_c.bottom) == 0*mm^2
        0
    else
        A_s.tension(ε_c.top, ε_c.bottom)/A_c.eff(ε_c.top, ε_c.bottom)
A_s = 314.159 mm^2
ρ_p.eff(ε_c.top.i, ε_c.bottom.i) = 0.0302784
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# For EN 1992-1-1 Eq 7.9:
E_s = 200 GPa
E_cm*E_c.effE_cm = 15.0384 GPa
A_c.eff(points[2, 1], points[2, 2]) = 0 m^2
α_e := E_s/(E_cm*1) = 5.11511
E_cm = 39099.9 MPa
σ_s(ε_c.top.i, ε_c.bottom.i) - k_t*(f_ct.eff/ρ_p.eff(ε_c.top.i, ε_c.bottom.i))*(1 + α_e*ρ_p.eff(ε_c.top.i, ε_c.bottom.i)) = 182.377 MPa
Δε_m(ε_c.top, ε_c.bottom) :=
    if ρ_p.eff(ε_c.top, ε_c.bottom) > 0
        (σ_s(ε_c.top, ε_c.bottom) - k_t*f_ct.eff/ρ_p.eff(ε_c.top, ε_c.bottom)*(1 + α_e*ρ_p.eff(ε_c.top, ε_c.bottom)))/E_s
    else
        0.6*σ_s(ε_c.top, ε_c.bottom)/E_s
σ_s(ε_c.top.i, ε_c.bottom.i) = 248816667 Pa
Δε_m(ε_c.top, ε_c.bottom) := max([
    {
        if ρ_p.eff(ε_c.top, ε_c.bottom) ≠ 0
            (σ_s(ε_c.top, ε_c.bottom) - k_t*f_ct.eff/ρ_p.eff(ε_c.top, ε_c.bottom)*(1 + α_e*ρ_p.eff(ε_c.top, ε_c.bottom)))/E_s
        else
            0.6*σ_s(ε_c.top, ε_c.bottom)/E_s
    };
    0.6*σ_s(ε_c.top, ε_c.bottom)/E_s
])
(σ_s(ε_c.top, ε_c.bottom) - k_t*f_ct.eff/ρ_p.eff(ε_c.top, ε_c.bottom)*(1 + α_e*ρ_p.eff(ε_c.top, ε_c.bottom)))/E_s
Δε_m(ε_c.top.i, ε_c.bottom.i) = 0.000911887
ρ_p.eff(ε_c.top.i, ε_c.bottom.i) = 0.0302784
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ϕ = 20 mm
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c := "SE no need"
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# V14
k_1_2 := 0.8
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k_2_2(y0, y1) :=
    tt ← (-y0 - y1)/(-2*min([y1; y0]))
    if tt > 1
        tt ← 1
    tt
    if tt < 0.5
        tt ← 0.5
    tt
# k2 is a coefficient which takes account of the distribution of strain:
# = 0,5 for bending
# = 1,0 for pure tension
# For cases of eccentric tension or for local areas, intermediate values of k2 should be
# used which may be calculated from the relation:
k_2_2(ε_c.top.i, ε_c.bottom.i) = 0.5
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# V12 | HUom v12. Ruotsi ei tarvitse ja siksi pois
k_3_2 == 7*ϕ/c  # V10  # C ei tarvitse SE
# V11
7*ϕ = 0.14 m
# V16 | ε
k_4_2 := 0.425
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# V22
# Vetovyöhyke
A_s.tension(ε_c.top.i, ε_c.bottom.i) = 314.159 mm^2
s_r.max(ε_c.top, ε_c.bottom) :=
    if (A_s.tension(ε_c.top, ε_c.bottom) > 0*mm^2)
        7*ϕ + k_1_2*k_2_2(ε_c.top, ε_c.bottom)*k_4_2*ϕ/ρ_p.eff(ε_c.top, ε_c.bottom)
    else
        1.3*(H - X(ε_c.top, ε_c.bottom))
A_s.tension(points[2, 1], points[2, 2]) = 0 m^2
s_r.max(ε_c.top.i, ε_c.bottom.i) = 252.291 mm
W_k(ε_c.top, ε_c.bottom) := Δε_m(ε_c.top, ε_c.bottom)*s_r.max(ε_c.top, ε_c.bottom)
W_k(ε_c.top.i, ε_c.bottom.i) = 0.230061 mm
# Uncracked condition
f_ctk0.05(f_ck) := 0.7*f_ctm(f_ck)
Δε_m(ε_c.top.i, ε_c.bottom.i) = 0.000911887
f_ctk := f_ctk0.05(f_ck)
s_r.max(ε_c.top.i, ε_c.bottom.i) = 252.291 mm
ζ := 1
W_k(ε_c.top.i, ε_c.bottom.i) = 0.230061 mm
σ_ct.p := f_ctk/ζ = 3.04832 MPa
ε_c.tp := σ_ct.p/E_cm = 7.79624e-5
tila(ε_c.top, ε_c.bottom) :=
    if W_k(ε_c.top, ε_c.bottom) > 0.4*mm
        0
    else
        1
tila(ε_c.top.i, ε_c.bottom.i) = 1
korjau := steppi*0.01
korjau = 1e-6
ok(ε_c.top, ε_c.bottom) :=
    top ← ε_c.top
    bottom ← ε_c.bottom
    if tila(top, bottom) == 0
        while tila(top, bottom) == 0
            bottom ← bottom + korjau
            if bottom > top
                top ← bottom
        [top; bottom]
    [top; bottom]
A_s.tension(ε_c.top, ε_c.bottom)
A_c.eff(ε_c.top, ε_c.bottom)
resultV2 :=
    res ← [1, N_Rd(points[1, 1], points[1, 2])/kN, M_Rd(points[1, 1], points[1, 2])/(kN*m), points[1, 1], points[1, 2], points[1, 1], points[1, 2], W_k(points[1, 1], points[1, 2])/mm, X(points[1, 1], points[1, 2])/mm, h_c.eff(points[1, 1], points[1, 2])/mm, A_c.eff(points[1, 1], points[1, 2])/mm^2, x_coord(points[1, 1], points[1, 2])/mm, h_c.eff.coord(points[1, 1], points[1, 2])/mm, A_neliö(points[1, 1], points[1, 2])/mm^2, s_r.max(points[1, 1], points[1, 2])/mm, Δε_m(points[1, 1], points[1, 2]), k_2_2(points[1, 1], points[1, 2]), ρ_p.eff(points[1, 1], points[1, 2]), A_s.tension(points[1, 1], points[1, 2])/mm^2]
    edel1 ← 0
    edel2 ← 0
    for x ∈ 2 .. rows(points)
        gg ← WRITETEXT("C.txt", [points[x, 1], points[x, 2], x])
        jj ← [x, points[x, 1], points[x, 2], edel1, edel2, tila(points[x, 1], points[x, 2])]
        edel1 ← points[x, 1]
        edel2 ← points[x, 2]
        jj ← WRITETEXT("A.txt", jj)
        top ← points[x, 1]
        bottom ← points[x, 2]
        if bottom < 0
            [top; bottom] ← ok(top, bottom)
        res ← stack(res, [x, N_Rd(top, bottom)/kN, M_Rd(top, bottom)/(kN*m), points[x, 1], points[x, 2], top, bottom, W_k(top, bottom)/mm, X(top, bottom)/mm, h_c.eff(top, bottom)/mm, A_c.eff(top, bottom)/mm^2, x_coord(top, bottom)/mm, h_c.eff.coord(top, bottom)/mm, A_neliö(top, bottom)/mm^2, s_r.max(top, bottom)/mm, Δε_m(top, bottom), k_2_2(top, bottom), ρ_p.eff(top, bottom), A_s.tension(top, bottom)/mm^2])
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CentrumNoCrackD := [0, 0; 0, 0]
Centrum04CrackD := [0, 0; 0, 0]
# [chart]
    X[1] := resultV[:, 2]
    Y[1] := resultV[:, 1]
    X[7] := resultV2[:, 3]
    Y[7] := resultV2[:, 2]
    X[6] := Centrum04CrackD[:, 1]
    X[3] := CentrumNoCrackD[:, 1]
    Y[6] := Centrum04CrackD[:, 2]
    Y[3] := CentrumNoCrackD[:, 2]
[x, N_Rd(top, bottom)/kN, M_Rd(top, bottom)/(kN*m), points[x, 1], points[x, 2], top, bottom, W_k(top, bottom)/mm, X(top, bottom)/mm, h_c.eff(top, bottom)/mm, A_c.eff(top, bottom)/mm^2, x_coord(top, bottom)/mm, h_c.eff.coord(top, bottom)/mm, A_neliö(top, bottom)/mm^2, s_r.max(top, bottom)/mm, Δε_m(top, bottom), k_2_2(top, bottom), ρ_p.eff(top, bottom), A_s.tension(top, bottom)/mm^2]
WRITETEXT("results.txt", resultV2) = [
    1, 2215.87, 0, 0, 0, 0, 0, 18670315, 9999000000, -3.333e9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;
    2, 2215.87, 0, 0, 0, 0, 0, 18670315, 9999000000, -3.333e9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;
    3, 2147.04, 2.44647, 0, 0, 0, 0, 6.26662, 3734.44, -1167.48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;
    4, 2078.21, 4.89294, 0, 0, 0, 0, 2.79822, 1867.22, -545.073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;
    5, 2009.38, 7.33942, 0, 0, 0, 0, 1.65414, 1244.81, -337.604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;
    6, 1940.55, 9.78589, 0, 0, 0, 0, 1.09116, 933.609, -233.87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;
    7, 1871.72, 12.2324, 0, 0, 0, 0, 0.760601, 746.887, -171.629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;
    8, 1802.89, 14.6788, 0, 0, 0, 0, 0.546263, 622.406, -130.135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;
    9, 1734.06, 17.1253, 0, 0, 0, 0, 0.398335, 533.491, -100.497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;
    10, 1665.23, 19.5718, 0, 0, 0, 0, 0.291913, 466.805, -78.2682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]
resultV2[:, 4] = [
    0.00239387; 0.00239387; 0.00239387; 0.00239387; 0.00239387; 0.00239387; 0.00239387; 0.00239387; 0.00239387; 0.00239387
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]
resultV2[:, 5] = [
    0.00239387; 0.00239387; 0.00224515; 0.00209643; 0.00194772; 0.001799; 0.00165028; 0.00150156; 0.00135284; 0.00120413
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]
transpose(WRITETEXT("results.txt", resultV2)[:, 17]) = [
    1, 1, 1, 1, 1, 1, 1, 1, 1, 1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]
yyu := 1
top := resultV2[yyu, 6]
bottom := resultV2[yyu, 7] = 0.00239387
resultV2[11, 7] = 0.00105541
W_k(top, bottom) = 18670315 mm
h_c.eff(top, bottom) = -3333000 m
A_c.eff(top, bottom) = 0 mm^2
cols(resultV2) = 19
rows(resultV2) = 101
ρ_p.eff(top, bottom) = 0
inini := 1 .. rows(resultV2)
ini := 3
ini2 := 18
ini3 := 7
A_s.tension(top, bottom) = 0 mm^2
# [chart]
    X[1] := resultV2[:, 1]
    Y[1] := resultV2[:, ini]
Δε_m(top, bottom) = -0.00143632
N_Rd(top, bottom) = 2215.87 kN
bottom*E_s*A_s*2 = 300.823 kN
# [chart]
    X[2] := resultV2[:, 1]
    Y[2] := resultV2[:, ini2]
ε_c.top.i = 0.00209239
ε_c.bottom.i = -0.00286955
resultV2[ini3, 4] = 0.00239387
resultV2[ini3, 5] = 0.00165028
ε_c.top.i = 0.00209239
resultV2[ini3, 6] = 0.00239387
resultV2[ini3, 7] = 0.00165028
ε_c.bottom.i = -0.00286955
resultV2[ini3, ini2] = 0
W_k(ε_c.top.i, ε_c.bottom.i) = 0.230061 mm
min(ε_x(Steel_coor.Y, ε_c.top.i, ε_c.bottom.i)*E_s) = -248.817 MPa
ok(ε_c.top.i, ε_c.bottom.i) = [0.00209239; -0.00286955]
ε_c.bottom.i = -0.00286955
transpose(resultV2[ini3, :]) = [7; 1871.72; 12.2324; 0.00239387; 0.00165028; 0.00239387; 0.00165028; 0.760601; 746.887; -171.629; 0; -630.887; -287.629; -39818; -669.354; -0.00113632; 1; 0; 0]
k_2_2(ε_c.top.i, ε_c.bottom.i) = 0.5
σ_s := -resultV2[ini3, 13]*MPa = 287.629 MPa
x := resultV2[ini3, 9] = 746.887
s_r.max(ε_c.top.i, ε_c.bottom.i) = 252.291 mm
Δε_m(ε_c.top.i, ε_c.bottom.i) = 0.000911887
s_r.max(ε_c.top.i, ε_c.bottom.i)*Δε_m(ε_c.top.i, ε_c.bottom.i) = 0.230061 mm
resultV[:, 2] = [
    0; 0; 2.44647; 4.89294; 7.33942; 9.78589; 12.2324; 14.6788; 17.1253; 19.5718
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]
rows(resultV[:, 2]) = 101
resultV[:, 1] = [
    2215.87; 2215.87; 2147.04; 2078.21; 2009.38; 1940.55; 1871.72; 1802.89; 1734.06; 1665.23
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]
j :=
    for i ∈ 1 .. rows(resultV[:, 2])
        if 0 > resultV[i, 1]
            i
            break
        i
    = 60
resultV[3, 1] = 2147.04
x.1 := resultV[j, 2] = 21.4468
y.1 := resultV[j, 1] = -13.3742
x.2 := resultV[j - 1, 2] = 23.0919
y.2 := resultV[j - 1, 1] = 7.15273
[a_l; b_l] := line([x.1; x.2], [y.1; y.2]) = [-280.987; 12.478]
nollak := -a_l/b_l = 22.5186
ChartData := transpose(augment(resultV2[:, 3], resultV2[:, 2])) = [
    0, 0, 2.44647, 4.89294, 7.33942, 9.78589, 12.2324, 14.6788, 17.1253, 19.5718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;
    2215.87, 2215.87, 2147.04, 2078.21, 2009.38, 1940.55, 1871.72, 1802.89, 1734.06, 1665.23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]
polkuTemp := "./TempFiles/"
num2str(diag)
FileNameChart := concat(polkuTemp, "SLS", "-chart-SLS-", num2str(diag), "-", num2str(kierot), ".csv") = "./TempFiles/SLS-chart-SLS-0-1.csv"
FileNameChart :=
    if kierot == 0
        concat(polkuTemp, "SLS", "-chart-SLS-", num2str(diag), ".csv")
    else
        concat(polkuTemp, "SLS", "-chart-SLS-", num2str(diag), "-", num2str(kierot), ".csv")
    = "./TempFiles/SLS-chart-SLS-0-1.csv"
j := WRITECSV(FileNameChart, ChartData) = [
    0, 0, 2.44647, 4.89294, 7.33942, 9.78589, 12.2324, 14.6788, 17.1253, 19.5718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;
    2215.87, 2215.87, 2147.04, 2078.21, 2009.38, 1940.55, 1871.72, 1802.89, 1734.06, 1665.23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]
max(resultV[:, 2]) = 44.7413
max(resultV[:, 1]) = 2215.87
toCSV := [
    "NmaxSLS", round(max(resultV2[:, 2]), 1);
    "NminSLS", round(resultV2[:, 2][length(resultV2[:, 2])], 1);
    "NMmaxSLS", round(max(resultV2[:, 3]), 1)
]
length(resultV2[:, 2]) = 101
FileNameSLS :=
    if kierot == 0
        concat(polkuTemp, "SLS-data-", num2str(diag), ".csv")
    else
        concat(polkuTemp, "SLS-data-", num2str(diag), "-", num2str(kierot), ".csv")
    = "./TempFiles/SLS-data-0-1.csv"
resultV2[:, 2][length(resultV2[:, 2])] = -115.862
j := WRITECSV(FileNameSLS, toCSV) = ["NmaxSLS", 2215.9; "NminSLS", -115.9; "NMmaxSLS", 44.7]
OuOut := j = ["NmaxSLS", 2215.9; "NminSLS", -115.9; "NMmaxSLS", 44.7]
