# Table 3.1 Strength and deformation characteristics for concrete EN 1992-1-1:2004 (E)
f_cm(f_ck) := f_ck + 8*MPa  # Mean value of concrete cylinder compressive strength
f_ctm(f_ck) :=
    if (f_ck ≤ 50*MPa)
        0.3*(f_ck/MPa)^(2/3)*MPa
    else
        2.12*ln(1 + f_cm(f_ck)/(MPa*10))*MPa  # Mean value of axial tensile strength of concrete
f_ctk0.05(f_ck) := 0.7*f_ctm(f_ck)  # Characteristic axial tensile strength of concrete 5% fractile
f_ctk0.95(f_ck) := 1.3*f_ctm(f_ck)  # Characteristic axial tensile strength of concrete 95% fractile
E_cm(f_ck) := 22*(f_cm(f_ck)/MPa/10)^0.3*GPa  # Secant modulus of elasticity of concrete
# Compressive strain in the concrete fig. 3.2
ε_c1(f_ck) := min([0.7*(f_cm(f_ck)/MPa)^0.31; 2.8])/1000
# Ultimate compressive strain in the concrete fig. 3.2
ε_cu1(f_ck) :=
    if f_ck ≥ 50*MPa
        (2.8 + 27*((98 - f_cm(f_ck)/MPa)/100)^4)/1000
    else
        0.0035
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ε_c2(f_ck) :=
    if f_ck ≥ 50*MPa
        (2 + 0.085*(f_ck/MPa - 50)^0.53)/1000
    else
        0.002
# Compressive strain in the concrete fig. 3.3
# Parabola-rectangle
ε_cu2(f_ck) :=
    if f_ck ≥ 50*MPa
        (2.6 + 35*((90 - f_ck/MPa)/100)^4)/1000
    else
        0.0035
# Ultimate compressive strain in the concrete fig. 3.3.
# Parabola-rectangle
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n(f_ck) :=
    if f_ck ≥ 50*MPa
        1.4 + 23.4*((90 - f_ck/MPa)/100)^4
    else
        2  # Exponent for equation EC 2 3.17
ε_c3(f_ck) :=
    if f_ck ≥ 50*MPa
        (1.75 + 0.55*((f_ck/MPa - 50)/40))/1000
    else
        0.00175
# Compressive strain in the concrete fig. 3.4.
# Bi-linear
# Ultimate compressive strain in the concrete fig. 3.3. Bi-linear
ε_cu3(f_ck) :=
    if f_ck ≥ 50*MPa
        (2.6 + 35*((90 - f_ck/MPa)/100)^4)/1000
    else
        0.0035
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# 3.17
ε_c(σ_c, ε_c2, ε_cu2, f_cd) := (-sqrt(-(f_cd*ε_c2^2*σ_c) + f_cd^2*ε_c2^2) + f_cd*ε_c2)/f_cd
σ_c2(ε_c, ε_c2, ε_cu2, f_cd) :=
    if ε_c < 0
        0
    else if ε_c ≤ ε_c2
        f_cd*(1 - (1 - ε_c/ε_c2)^2)
    else if ε_c ≤ ε_cu2
        f_cd
    else
        NaN
σ_c3(ε_c, ε_c3, ε_cu3, f_cd) :=
    if ε_c < 0
        0
    else if ε_c ≤ ε_c3
        f_cd*ε_c/ε_c3
    else if ε_c ≤ ε_cu3
        f_cd
    else
        NaN
