# Worksheet setting: ORIGIN = 1
# NEd pos betonin puristus
σ_s(N_Ed, b, h, A_ct, A_s.min, f_ct.eff) :=
    k_1 ←
        if N_Ed ≥ 0
            1.5
        else
            2/3
    σ_c ← N_Ed/(b*h)
    k_c ← min*[1; 0.4*σ_c/(k_1*f_ct.eff)]
    k ← min([(0.35/(500*mm))*(300*mm - b) + 1; 1])
    k_c*k*f_ct.eff*A_ct/A_s.min
# f_ct.eff = f_ctm
