# Worksheet setting: ORIGIN = 1
E_s := 200*GPa
f_ck := 50*MPa
# [reference: Betonin_lujuus_ja_muodonmuutosominaisuudet.mcdx]
f_ct.eff := f_ctm(f_ck) = 4.07163 MPa
W_k := S_r.max*ε_smcm  # error: This variable is undefined. Check that the label is set correctly.
# 7.8
ρ_p.eff(A_s, A_c.eff) := A_s/A_c.eff
ε_smcm(σ_s, ρ_p.eff) :=
    k_t ← 0.4
    ρ_p.eff
    α_e ← E_s/E_cm(f_ck)
    (σ_s - f_ct.eff/ρ_p.eff*(1 + α_e*ρ_p.eff))/E_s
A_s := 2*(10*mm)^2*π = 628.319 mm^2
σ_s := 200*MPa
A_c.eff := 300*mm*80*mm = 0.024 m^2
ε_smcm(σ_s, A_s, A_c.eff) =  # error: This function accepts at most {0} arguments but is applied to {1}.
k_1(ε_1, ε_2) :=
    if ε_1 > ε_2
        t ← ε_1
        ε_1 ← ε_2
        ε_2 ← t
    else
        1
    ε_1 ← -ε_1
    ε_2 ← -ε_2
    if (ε_1 == 0)
        k_2 ← 0.5
    else
        k_2 ← (ε_1 + ε_2)/(2*ε_1)
    if k_2 > 1
        k_2 ← 1
    if k_2 < 0.5
        k_2 ← 0.5
S_r.max(k_2, C, ϕ, ρ_p.eff) :=
    k_1 ← 0.8
    k_3 ← 3.4
    k_4 ← 0.425
    k_3*C + k_1*k_2*k_4*ϕ/ρ_p.eff
5*(25*mm + 10*mm/2) = 150 mm
