# Worksheet setting: ORIGIN = 1
A_c.d(d) :=
    π*(d/2)^2  # Area of the circle, input diameter
f_line(x_0, y_0, x_1, y_1, x) := (y_1 - y_0)/(x_1 - x_0)*(x - x_0) + y_0
f_line.zero(x_0, y_0, x_1, y_1) :=
    if y_1 ≠ y_0
        (x_0*y_1 - x_1*y_0)/(y_1 - y_0)
    else
        if y_1 < 0
            -99999999999*m
        else
            99999999999*m
ones(x) :=
    for x ∈ 1, 2 .. x
        result[x, :] ← 1
    result
AddMatrix(A, B) :=
    LinesA ← rows(A)
    LinesB ← rows(B)
    for x ∈ 1 .. LinesB
        A[LinesA + x, :] ← B[x, :]
        A
    A
