M(M) := csort(M, 1)  # Sortataan matriisi
MsubCV(M, C, V) :=
    temp ←
        for i ∈ 1 .. rows(M)
            M[i, C] ← M[i, C] + V
            M
    temp
# Tällä saa lisättyä sarakkeesta C arvon V matriisista M
a := 3*m = 3 m
M_ZeroReset(M) :=
    for i ∈ 1 .. rows(M)
        for j ∈ 1 .. cols(M)
            if ||M[i, j]/SIUnitsOf(M[i, j])| < 0.000000001|
                M[i, j] ← 0
        M
SIUnitsOf(a) = 1 m
M_FunktBase(M) :=
    a ← 1
    kay ← mean(M[:, 2])
    if M[1, 1] == M[2, 1]
        up[1, 1] ← M[1, 1]
        up[1, 2] ← max([M[1, 2]; M[2, 2]])
        down[1, 1] ← M[1, 1]
        down[1, 2] ← min([M[1, 2]; M[2, 2]])
        a ← 2
    else
        up[1, 1] ← M[1, 1]
        up[1, 2] ← M[1, 2]
        down[1, 1] ← M[1, 1]
        down[1, 2] ← M[1, 2]
    for i ∈ a + 1 .. rows(M)
        if M[i, 2] ≥ kay
            up[rows(up) + 1, 1] ← M[i, 1]
            up[rows(up), 2] ← M[i, 2]
        else
            down[rows(down) + 1, 1] ← M[i, 1]
            down[rows(down), 2] ← M[i, 2]
    if up[rows(up), 1] > down[rows(down), 1]
        down[rows(down) + 1, 1] ← up[rows(up), 1]
        down[rows(down), 2] ← up[rows(up), 2]
    if up[rows(up), 1] < down[rows(down), 1]
        down[rows(up) + 1, 1] ← down[rows(down), 1]
        down[rows(up), 2] ← down[rows(down), 1]
    for i ∈ 1 .. rows(up) - 1
        [a; b] ← line([up[i, 1]; up[i + 1, 1]], [up[i, 2]; up[i + 1, 2]])
        Upp[1, i] ← a
        Upp[2, i] ← b
        Upp
    for i ∈ 1 .. rows(down) - 1
        if (down[i, 2] == 0 and down[i + 1, 2] == 0)
            [a; b] ← [0; 0]
        else
            [a; b] ← line([down[i, 1]; down[i + 1, 1]], [down[i, 2]; down[i + 1, 2]])
        Downpp[1, i] ← a
        Downpp[2, i] ← b
        Downpp
    t ← [up; down; Upp; Downpp]  # Ensimmäin luku. Onko yksittäinen vai pari
# Mennään loput matriisista läpi. Talletetaan kay suuremman up ja alemmat down
# Tarkastetaan viimenen arvo. Onko yksittäinen vai pari
# Muodostetaan funktiot
# Line([x1,x2;y1,y2]-> a= vakio b= x:n kerroin
# Ylemmälle käyrälle
# Alemmalle käyrälle
# Palautus
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